** GMPT=4
** alpha = 0.500
** num_el_fine_th = 3
** Axial Imperfection = 0.0 #Not percentage
** Circumferential Imperfection = 0.0 #Not percentage
** Eccentricity = 0.00 # Percentage
** Rm = 0.8390
** tg = 0.0498
** ID = 1.6282
** constit = "vm"
** Fluid Cavity and elements.  If alpha = 0.5, then flux control
** 15120 nodes, 10284 elements.
** Generated on 9/13/2018 at 8:13
*Heading
Z is Tube Axis
Min Wall Thickness is (x>0,y=0)
*Preprint, echo=NO, model=NO, history=NO, contact=NO
****************************************
***************** PART *****************
****************************************
*part, name=PART
*node, nset=NS_ALLNODES
1, 0.814100000000, 0.000000000000, 0.000000000000
2, 0.813928387316, 0.016714972970, 0.000000000000
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*element, type=C3D8R, elset=ES_ALLELEMENTS
1, 114, 142, 141, 113, 2, 30, 29, 1
2, 142, 170, 169, 141, 30, 58, 57, 29
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*nset, nset=NS_TOPSURFACE
10593, 10594, 10595, 10596, 10597, 10598
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*nset, nset=NS_BOTTOMSURFACE
1, 2, 3, 4, 5, 6
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*nset, nset=NS_DISPROT_HI
10539
*nset, nset=NS_DISPROT_LO
3445
*nset, nset=NS_DISPROT_LO_BACK
12476
*nset, nset=NS_RADIALCONTRACTION
85, 197, 309, 421, 533, 645
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*nset, nset=NS_AXIALSYMM
1, 29, 57, 85, 113, 141
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*elset, elset=ES_Z
3, 84, 165, 246, 327, 408
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*elset, elset=ES_THICKNESS
1, 2, 3
*elset, elset=ES_THICKNESS_BACK
6929, 6930, 6931
*elset, elset=ES_THICKNESS_SIDE
6857, 6858, 6859
*elset, elset=ES_ANALZONE
3, 6, 9, 12, 15, 18
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*elset, elset=ES_LEPROF
3, 6, 9, 12, 15, 18
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*elset, elset=ES_WHOLEID
1 ,4 ,7 ,10 ,13 ,16 
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*node, nset=NS_RPTOP
15121, 0, 0, 2.624893864941
*node, nset=RP_CAV
15122, 0, 0, 0
*element, type=SFM3D3, elset=ES_SURFELS
10285, 15121, 10610, 10609
10286, 15121, 10609, 10608
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*orientation, name=ANISOTROPY, system=cylindrical, definition=coordinates
0, 0, 0, 0, 0, 1
*solid section, elset=ES_ALLELEMENTS, material=MATERIAL, orientation=ANISOTROPY
*Hourglass Stiffness
40.0, , ,
*transform, nset=NS_ALLNODES, type=C
0, 0, 0, 0, 0, 1
*surface section, elset=ES_SURFELS
*end part
****************************************
*************** Assembly ***************
****************************************
*assembly, name=ASSEMBLY
*instance, name=INSTANCE, part=PART
*end instance
*transform, nset=INSTANCE.NS_RPTOP, type=C
0, 0, 0, 0, 0, 1
** Riks displacement monitoring node must be defined in the assembly
*nset, nset=RIKSMON, instance=INSTANCE
NS_DISPROT_LO
*surface, type=node, name=SURF_TOPSURFACE
INSTANCE.NS_TOPSURFACE
*surface, type=node, name=SURF_BOTSURFACE
INSTANCE.NS_BOTTOMSURFACE
*surface, type=element, name=SURF_IDSURFACE
INSTANCE.ES_WHOLEID, S6
*orientation, name=ORI_COUPLING, system=cylindrical, definition=coordinates
0, 0, 0, 0, 0, 1
*coupling, constraint name=CONSTRAINT_TOPSURFACE, ref nod=INSTANCE.NS_RPTOP, surface=SURF_TOPSURFACE, orientation=ORI_COUPLING
*kinematic
** Surface definition for the fluid cavity
*surface, type=element, name=SURF_CAVITY
INSTANCE.ES_SURFELS, SPOS
INSTANCE.ES_WHOLEID, S6
*end assembly
****************************************
***************  MATERIAL **************
****************************************
** This is Extraction Iteratoin 85
*material, name=MATERIAL
*elastic
10036, 0.320
*plastic
37.21720367, 0.00000000
38.54563627, 0.00015865
39.36944847, 0.00039025
39.86620373, 0.00065833
40.22064525, 0.00095938
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50.98620794, 0.80241663
****************************************
*************** FLUID CAV  *************
****************************************
*fluid behavior, name=FLUID
*fluid density
1.0
*fluid cavity, name=FLUIDCAVITY, behavior=FLUID, refnode=INSTANCE.RP_CAV, surface=SURF_CAVITY

*boundary
** Top Ref Pt:  Only U3, UR3 permitted
INSTANCE.NS_RPTOP, 1, 2
INSTANCE.NS_RPTOP, 4, 5
** AxialSymmetry Nodes:  Same as YSYMM
INSTANCE.NS_AXIALSYMM, 2,
**INSTANCE.NS_AXIALSYMM, 4,
**INSTANCE.NS_AXIALSYMM, 6,
** Bottom surface nodes:  Same as ZSYMM
INSTANCE.NS_BOTTOMSURFACE, 3, 3
** Cavity reference node fully constrained
INSTANCE.RP_CAV, 1, 6
****************************************
*************** STEP *******************
****************************************
*step, name=STEP, nlgeom=yes, inc=1000
*static
0.00125, 1., 1e-06, .002
**[1]Initial incr, [2]Total step, [3]Min incr, [4]Max incr
*fluid flux
INSTANCE.RP_CAV, 0.290
** Increase number of increment cutbacks permitted
*controls, parameters=time incrementation
 , , , , , , , 10, , , , ,
*output, field, frequency=1
** COORn must be called under history output, but COORD can be called in field
*node output, nset=INSTANCE.NS_DISPROT_LO
U, UR
*node output, nset=INSTANCE.NS_DISPROT_HI
U, UR
*node output, nset=INSTANCE.NS_ALLNODES
U, UR
*node output, nset=INSTANCE.NS_RPTOP
U, UR, CF
*element output, elset=INSTANCE.ES_LEPROF
COORD
*element output, elset=INSTANCE.ES_ALLELEMENTS, directions=YES
S, PE, LE, P
*output, history, frequency=1
*node output, nset=INSTANCE.RP_CAV
CVOL, PCAV
** Note:  This node print will result in abaqus printing
** Nearly 80000 lines worth of meaningless nodal-connectivity
** information to the dat file.
*node print, nset=INSTANCE.RP_CAV, summary=NO
CVOL
*end step
